**
** ABAQUS Input Deck Generated by HyperMesh Version  : 13.0.0.119
** Generated using HyperMesh-Abaqus Template Version : 13.0
**
**   Template:  ABAQUS/STANDARD 3D
**
*HEADING
BelugaXL_Peen_Forming_Test
*NODE
      4000,  3167.2226787228,  -782.3642986434,  299.69401448807
      4001,  3167.3053231877,  -812.9476605438,  295.7762955751
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*ELEMENT,TYPE=S4R,ELSET=Surface_35
         1,     12251,     12256,     12253,     12247
         2,     12245,     12257,     12174,     12173
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*ELEMENT,TYPE=S4R,ELSET=Surface_50
      2573,      9006,      9007,      9086,      9005
      2574,      9007,      9008,      9087,      9086
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*SHELL SECTION, ELSET=Surface_35, OFFSET= SNEG, COMPOSITE
0.1      ,         3,ALUMINIO,0.
0.1      ,         3,ALUMINIO,0.
0.1      ,         3,ALUMINIO,0.
0.1      ,         3,ALUMINIO,0.
0.1      ,         3,ALUMINIO,0.
0.1      ,         3,ALUMINIO,0.
0.1      ,         3,ALUMINIO,0.
0.1      ,         3,ALUMINIO,0.
0.1      ,         3,ALUMINIO,0.
0.1      ,         3,ALUMINIO,0.
0.1      ,         3,ALUMINIO,0.
0.1      ,         3,ALUMINIO,0.
0.1      ,         3,ALUMINIO,0.
0.1      ,         3,ALUMINIO,0.
0.1      ,         3,ALUMINIO,0.
0.1      ,         3,ALUMINIO,0.
0.1      ,         3,ALUMINIO,0.
0.1      ,         3,ALUMINIO,0.
0.1      ,         3,ALUMINIO,0.
0.1      ,         3,ALUMINIO,0.
0.1      ,         3,ALUMINIO,0.
0.1      ,         3,ALUMINIO,0.
0.1      ,         3,ALUMINIO,0.
0.1      ,         3,ALUMINIO,0.
0.1      ,         3,ALUMINIO,0.
*SHELL SECTION, ELSET=Surface_50, OFFSET= SNEG, COMPOSITE
0.1       ,         3,ALUMINIO,0.
0.1       ,         3,ALUMINIO,0.
0.1       ,         3,ALUMINIO,0.
0.1       ,         3,ALUMINIO,0.
0.1       ,         3,ALUMINIO,0.
0.1       ,         3,ALUMINIO,0.
0.1       ,         3,ALUMINIO,0.
0.1       ,         3,ALUMINIO,0.
0.1       ,         3,ALUMINIO,0.
0.1       ,         3,ALUMINIO,0.
0.1       ,         3,ALUMINIO,0.
0.1       ,         3,ALUMINIO,0.
0.1       ,         3,ALUMINIO,0.
0.1       ,         3,ALUMINIO,0.
0.1       ,         3,ALUMINIO,0.
0.1       ,         3,ALUMINIO,0.
0.1       ,         3,ALUMINIO,0.
0.1       ,         3,ALUMINIO,0.
0.1       ,         3,ALUMINIO,0.
0.1       ,         3,ALUMINIO,0.
0.1       ,         3,ALUMINIO,0.
0.1       ,         3,ALUMINIO,0.
0.1       ,         3,ALUMINIO,0.
0.1       ,         3,ALUMINIO,0.
0.1       ,         3,ALUMINIO,0.
*ELSET, ELSET=ALLELEMENTS
         1,         2,         3,         4,         5,         6
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*ELSET, ELSET=CHAPON
       698,       694,       690,       687,       685,       684
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*ELSET, ELSET=NERVIOS
*ELSET, ELSET=NERVIOS_Y_CHAPON
       698,       694,       690,       687,       685,       684
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*ELSET, ELSET=Surface_35
         1,         2,         3,         4,         5,         6
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*ELSET, ELSET=Surface_50
      2573,      2574,      2575,      2576,      2577,      2578
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**
*NSET, NSET=ALLNODES
      4000,      4001,      4002,      4003,      4004,      4005
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*NSET, NSET=N_PLACA
      4000,      4001,      4002,      4003,      4004,      4005
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*MATERIAL, NAME=ALUMINIO
*ELASTIC, DEPENDENCIES =     1, TYPE = ISOTROPIC
67324.0   ,0.33      ,0.0       ,0.0
67324.0   ,0.33      ,0.0       ,1.0
*****
*STEP, INC =        10000, NAME = NEGATIVO, NLGEOM = YES
*Static, stabilize
0.01, 1., 1e-05, 1.
*CONTROLS,PARAMETERS=TIME INCREMENTATION
, , , , , , , 10,
*BOUNDARY
      4000,3,3,0
      4001,3,3,3.91771891297003
      4002,3,3,8.47603015883004
      4003,3,3,13.72684749319
      4004,3,3,19.7336164603
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     16354,3,3,148.45834013148
** OUTPUT REQUESTS
**
*Restart, write, frequency=0
**
** FIELD OUTPUT: F-Output-1
**
*Output, field, variable=PRESELECT, NUMBER INTERVAL=4
*Element Output, directions=YES, ELSET=ALLELEMENTS
1, 2, 3, 73, 74, 75
E,S
*Output, history, variable=PRESELECT
*EL PRINT, elset=NERVIOS_Y_CHAPON, FREQUENCY=9999999, position=INTEGRATION POINTS, summary=NO, totals=NO
1, 75
S11,S22,S12,MISES,SP
*End Step
**
